# OpenSim document version 30000
MarkerSet:
  Marker D2P: LA5P2 (0.00126676 -0.0153852 -0.0152447)
  Marker D3P: LA5P3 (-0.00360336 -0.0187179 -0.0160623)
  Marker D4P: LA5P4 (-0.00772855 -0.0189967 -0.0115102) fixed=true
  Marker D5P: LA5P5 (-0.0101363 -0.0174918 -0.0081413)
  Marker D2H: LA4M2 (0.00146741 -0.00738783 -0.0121883)
  Marker D3H: LA4M3 (-0.0020906 -0.00801564 -0.0111827)
  Marker D4H: LA4M4 (-0.00657609 -0.00723419 -0.00973516)
  Marker D5H: LA4M5 (-0.00859257 -0.00815796 -0.00808664)
  Marker HM: LA4M2 (-0.00173754 0.0268452 -0.0116257)
  Marker HL: LA4M4 (-0.00692357 0.0321725 -0.0102104)
  Marker ArmM: LA2U (0.00191959 -0.0140361 -0.021595)
  Marker ArmL: LA2U (-0.00996767 -0.00854712 -0.0177573)
  Marker ArmC: LA2U (-0.00797829 -0.0240175 -0.0196133)
