# OpenSim document version 40500
ForwardTool RightArmAndHand:
  model_file: C:\OpenSim 4.5\RightArmAndHand_scaled.osim
  replace_force_set: false
  results_directory: .
  output_precision: 8
  initial_time: 0
  final_time: 13.646
  solve_for_equilibrium_for_auxiliary_states: false
  maximum_number_of_integrator_steps: 20000
  maximum_integrator_step_size: 1
  minimum_integrator_step_size: 1e-7
  integrator_error_tolerance: 0.0001
  use_specified_dt: false
  ControllerSet Controllers:
    ControlSetController: controls_file=emg_norm.sto
