# OpenSim document version 40500
InverseKinematicsTool:
  time_range: 0 13.64
  output_motion_file: C:\temporary_file\BG_klinik\newPipeline\data\processed\Ik_result\N10_IK\IK_result01
  marker_file: ../../data/processed/ROM_Ellenbogenflex_R 1.trc
  IKTaskSet:
    IKMarkerTask C7: apply=false weight=1
    IKMarkerTask IJ: apply=false weight=1
    IKMarkerTask RAC: apply=false weight=1
    IKMarkerTask REL: apply=false weight=1
    IKMarkerTask REM: apply=false weight=1
    IKMarkerTask RUS: apply=false weight=1
    IKMarkerTask PX: apply=false weight=1
    IKMarkerTask RAI: apply=false weight=1
    IKMarkerTask RRS: apply=false weight=1
    IKMarkerTask RUA1: apply=true weight=1
    IKMarkerTask RUA2: apply=true weight=1
    IKMarkerTask RUA3: apply=true weight=1
    IKMarkerTask RUA4: apply=true weight=1
    IKMarkerTask ST1: apply=true weight=1
    IKMarkerTask ST3: apply=true weight=1
    IKMarkerTask ST2: apply=true weight=1
    IKMarkerTask RLA4: apply=true weight=1
    IKMarkerTask RLA1: apply=true weight=1
    IKMarkerTask RGH: apply=false weight=1
    IKMarkerTask T8: apply=false weight=1
    IKMarkerTask REB: apply=false weight=1
    IKMarkerTask HWM: apply=false weight=1
    IKMarkerTask RLA2: apply=true weight=1
    IKMarkerTask RLA3: apply=true weight=1
    IKMarkerTask RTS: apply=false weight=1
    IKMarkerTask RPC: apply=false weight=1
    IKMarkerTask RAA: apply=false weight=1
    IKMarkerTask RACR1: apply=true weight=1
    IKMarkerTask RACR2: apply=true weight=1
    IKMarkerTask RACR3: apply=true weight=1
    IKMarkerTask RH1: apply=true weight=1
    IKMarkerTask RH2: apply=true weight=1
    IKMarkerTask RH3: apply=true weight=1
    IKMarkerTask RMCP2: apply=false weight=1
    IKMarkerTask RMCP3: apply=false weight=1
    IKMarkerTask RMCP5: apply=false weight=1
