# OpenSim document version 40500
ScaleTool RightArmAndHand-scaled:
  mass: 0 [kg]
  height: -1
  age: -1
  GenericModelMaker:
    marker_set_file: markers07.xml
  ModelScaler:
    apply: true
    marker_file: ../../../temporary_file/BG_klinik/newPipeline/data/processed/Static 1_gm.trc
    time_range: 0 3.52
    preserve_mass_distribution: true
  MarkerPlacer:
    apply: true
    marker_file: ../../../temporary_file/BG_klinik/newPipeline/data/processed/Static 1_gm.trc
    time_range: 0 3.52
    max_marker_movement: -1
    IKTaskSet:
      IKMarkerTask C7: apply=true weight=100
      IKMarkerTask IJ: apply=true weight=200
      IKMarkerTask RAC: apply=true weight=50
      IKMarkerTask REL: apply=true weight=100
      IKMarkerTask REM: apply=true weight=100
      IKMarkerTask RUS: apply=true weight=100
      IKMarkerTask PX: apply=true weight=200
      IKMarkerTask RAI: apply=true weight=200
      IKMarkerTask RRS: apply=true weight=100
      IKMarkerTask RUA1: apply=true weight=100
      IKMarkerTask RUA2: apply=true weight=100
      IKMarkerTask RUA3: apply=true weight=100
      IKMarkerTask RUA4: apply=true weight=100
      IKMarkerTask ST1: apply=true weight=100
      IKMarkerTask ST3: apply=true weight=100
      IKMarkerTask ST2: apply=true weight=100
      IKMarkerTask RLA4: apply=true weight=100
      IKMarkerTask RLA1: apply=true weight=100
      IKMarkerTask RGH: apply=true weight=400
      IKMarkerTask T8: apply=true weight=100
      IKMarkerTask REB: apply=true weight=200
      IKMarkerTask HWM: apply=true weight=100
      IKMarkerTask RLA2: apply=true weight=100
      IKMarkerTask RLA3: apply=true weight=100
      IKMarkerTask RTS: apply=true weight=100
      IKMarkerTask RPC: apply=true weight=50
      IKMarkerTask RAA: apply=true weight=100
      IKMarkerTask RACR1: apply=true weight=5
      IKMarkerTask RACR2: apply=true weight=5
      IKMarkerTask RACR3: apply=true weight=100
      IKMarkerTask RH1: apply=true weight=100
      IKMarkerTask RH2: apply=true weight=100
      IKMarkerTask RH3: apply=true weight=100
      IKMarkerTask RMCP2: apply=true weight=5
      IKMarkerTask RMCP3: apply=true weight=200
      IKMarkerTask RMCP5: apply=true weight=5
